# OpenSim document version 40000
Model:
  Ground
  BodySet:
    Body humerus: mass=1.905 [kg] mass_center=(0.01806 -0.1805 -0.01275)
        inertia=(0.01165 -0.00035 -0.00023 0.00191 0.00123 0.01258)
        meshes=C:\Repositories\upper_arm_model\Geometry\humerus.vtp
      PhysicalOffsetFrame humerus_offset: socket_parent=.. translation=(0.0061 -0.2904 -0.0123) [meters]
      WrapEllipsoid Elbow_BIC_BRD: xyz_body_rotation=(-0.128631 0.137532 0.0307178) translation=(0.0019 -0.289 -0.014)
          quadrant=x dimensions=(0.015 0.015 0.1)
      WrapCylinder TRI: xyz_body_rotation=(-0.14015 -0.00628319 0.154985) translation=(0.0028 -0.2919 -0.0119)
          quadrant=all radius=0.016 length=0.1
      WrapEllipsoid BIClong: xyz_body_rotation=(-2.00434 -1.00164 0.975465) translation=(0.0033 0.005 0.0003)
          quadrant=-y dimensions=(0.025 0.02 0.02)
    Body ulna: mass=1.1053 mass_center=(0.00972 -0.09595 0.02429)
        inertia=(0.00541 0.00032 -8e-5 0.00115 0.00109 0.00494)
        meshes=C:\Repositories\upper_arm_model\Geometry\ulna.vtp
      PhysicalOffsetFrame ulna_offset: socket_parent=.. translation=(0.0004 -0.011503 0.019999)
    Body radius: mass=0.23359 mass_center=(0.03363 -0.18156 0.0156) inertia=(0.00044 3e-5 0 9e-5 6e-5 0.0004)
        meshes=C:\Repositories\upper_arm_model\Geometry\radius.vtp
      PhysicalOffsetFrame radius_offset: socket_parent=.. translation=(0.018 -0.242 0.025)
    Body proximal_row: mass=0.0001 mass_center=(0 0 0) inertia=(1e-5 0 0 1e-5 0 1e-5)
        meshes=(C:\Repositories\upper_arm_model\Geometry\lunate.vtp C:\Repositories\upper_arm_model\Geometry\sdfastSCAPHOIDw.vtp C:\Repositories\upper_arm_model\Geometry\sdfastPISIFORMw.vtp C:\Repositories\upper_arm_model\Geometry\sdfastTRIQUETRALw.vtp)
      PhysicalOffsetFrame proximal_row_offset: socket_parent=.. translation=(0.003992 -0.015054 0.002327)
    Body hand: mass=0.47 mass_center=(-0.00301 0.042 -0.00112) inertia=(0.000545 0 0 0.000145 1e-5 0.00015)
        meshes=(C:\Repositories\upper_arm_model\Geometry\sdfast_1seg_hand_fr_c_5mc.vtp C:\Repositories\upper_arm_model\Geometry\sdfast_1seg_hand_fr_c_4mc.vtp C:\Repositories\upper_arm_model\Geometry\sdfast_1seg_hand_fr_c_3mc.vtp C:\Repositories\upper_arm_model\Geometry\sdfast_1seg_hand_fr_c_2mc.vtp C:\Repositories\upper_arm_model\Geometry\sdfast_1seg_hand_fr_c_trapezium.vtp C:\Repositories\upper_arm_model\Geometry\sdfast_1seg_hand_fr_c_trapezoid.vtp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)
  JointSet:
    BallJoint ground_elbow: socket_parent_frame=ground_offset socket_child_frame=humerus_offset
      Coordinate ground_elbow_coord_0: default_value=0 locked=true
      Coordinate ground_elbow_coord_1: default_value=0 locked=true
      Coordinate ground_elbow_coord_2: default_value=0 locked=true
      PhysicalOffsetFrame ground_offset: socket_parent=/ground translation=(0 0 0)
      PhysicalOffsetFrame humerus_offset: socket_parent=/bodyset/humerus translation=(0 0 0)
    CustomJoint elbow: socket_parent_frame=/bodyset/humerus/humerus_offset socket_child_frame=/bodyset/ulna
      Coordinate elbow_flexion: default_value=0 range=(0 2.269) clamped=true
      SpatialTransform:
        TransformAxis rotation1: coordinates=elbow_flexion axis=(0.04940001 0.03660001 0.9981083)
            LinearFunction(coefficients=1 0)
        TransformAxis rotation2: axis=(0 1 0)
        TransformAxis rotation3: axis=(0 0 1)
        TransformAxis translation1: axis=(1 0 0)
        TransformAxis translation2: axis=(0 1 0)
        TransformAxis translation3: axis=(0 0 1)
    CustomJoint radioulnar: socket_parent_frame=/bodyset/ulna/ulna_offset socket_child_frame=/bodyset/radius
      Coordinate wr_prosup: default_value=0 range=(-1.57 1.57) clamped=true locked=true
      SpatialTransform:
        TransformAxis rotation1: coordinates=wr_prosup axis=(-0.01716099 0.9926656 -0.119668)
            LinearFunction(coefficients=1 0)
        TransformAxis rotation2: axis=(0 1 0)
        TransformAxis rotation3: axis=(0 0 1)
        TransformAxis translation1: axis=(1 0 0)
        TransformAxis translation2: axis=(0 1 0)
        TransformAxis translation3: axis=(0 0 1)
    CustomJoint radiocarpal: socket_parent_frame=/bodyset/radius/radius_offset socket_child_frame=/bodyset/proximal_row
      Coordinate wr_abad: default_value=0 range=(-0.1745329 0.4363323) clamped=true locked=true
      SpatialTransform:
        TransformAxis rotation1: coordinates=wr_abad axis=(-0.819064 -0.135611 -0.557444)
            LinearFunction(coefficients=1 0)
        TransformAxis rotation2: axis=(0 1 0)
        TransformAxis rotation3: axis=(0 0 1)
        TransformAxis translation1: axis=(1 0 0)
        TransformAxis translation2: axis=(0 1 0)
        TransformAxis translation3: axis=(0 0 1)
    CustomJoint wrist_hand: socket_parent_frame=/bodyset/proximal_row/proximal_row_offset
        socket_child_frame=/bodyset/hand
      Coordinate wr_flex: default_value=0 range=(-1.22173 1.22173) clamped=true locked=true
      SpatialTransform:
        TransformAxis rotation1: axis=(1 0 0)
        TransformAxis rotation2: axis=(0 1 0)
        TransformAxis rotation3: coordinates=wr_flex axis=(0.9564267 -0.2522069 0.147104)
            LinearFunction(coefficients=1 0)
        TransformAxis translation1: axis=(1 0 0)
        TransformAxis translation2: axis=(0 1 0)
        TransformAxis translation3: axis=(0 0 1)
  ForceSet:
    CoordinateLimitForce elbow_flexion_ligaments: coordinate=elbow_flexion upper_stiffness=0.3037 [N*m/degree]
        upper_limit=85 [degrees] lower_stiffness=100 [N*m/degree] lower_limit=14 [degrees] damping=0
        transition=139.5813 [degrees]
    CoordinateLimitForce elbow_flexion_damping: coordinate=elbow_flexion upper_stiffness=1e-8 upper_limit=190
        lower_stiffness=1e-8 lower_limit=190 damping=0.001745 transition=1
    Millard2012EquilibriumMuscle TRIlat: max_isometric_force=2490 optimal_fiber_length=0.1138 tendon_slack_length=0.098
        pennation_angle_at_optimal=0.1570796 [radians] max_contraction_velocity=10 default_activation=0.01
        minimum_activation=0
      PathPoint P1: humerus (-0.00599 -0.12646 0.00428)
      PathPoint P2: humerus (-0.02344 -0.14528 0.00928)
      PathPoint P3: humerus (-0.03184 -0.22637 -0.01217)
      PathPoint P4: humerus (-0.01743 -0.26757 -0.01208)
      PathPoint P5: ulna (-0.0219 0.01046 -0.00078)
      PathWrap: wrap_object=TRI method=hybrid
      ActiveForceLengthCurve: min_norm_active_fiber_length=0.4327 transition_norm_fiber_length=0.728
          max_norm_active_fiber_length=1.595 shallow_ascending_slope=0.4613 minimum_value=0
      ForceVelocityCurve: concentric_slope_at_vmax=0 concentric_slope_near_vmax=0.25 isometric_slope=5
          eccentric_slope_at_vmax=0 eccentric_slope_near_vmax=0.15 max_eccentric_velocity_force_multiplier=1.4
      FiberForceLengthCurve: strain_at_zero_force=0 strain_at_one_norm_force=0.6405 stiffness_at_low_force=0.0751
          stiffness_at_one_norm_force=6.3163 curviness=0.6658
      TendonForceLengthCurve: strain_at_one_norm_force=0.033 stiffness_at_one_norm_force=37.393
          norm_force_at_toe_end=0.2255 curviness=0.4504
    Millard2012EquilibriumMuscle BIClong: max_isometric_force=2674.87 optimal_fiber_length=0.1157
        tendon_slack_length=0.2723 pennation_angle_at_optimal=0 max_contraction_velocity=10 default_activation=0.01
        minimum_activation=0
      PathPoint P1: humerus (-0.01498973 -0.008301891 -0.01305)
      PathPoint P2: humerus (-0.02094 0.00694952 -0.00461)
      PathPoint P3: humerus (0.02131 0.01793 0.01028)
      PathPoint P4: humerus (0.02378 -0.00511 0.01201)
      PathPoint P5: humerus (0.01345 -0.02827 0.00136)
      PathPoint P6: humerus (0.01068 -0.07736 -0.00165)
      PathPoint P7: humerus (0.01703 -0.12125 0.00024)
      PathPoint P8: humerus (0.0228 -0.1754 -0.0063)
      MovingPathPoint default: radius socket_x_coordinate=/jointset/radioulnar/wr_prosup
          socket_y_coordinate=/jointset/radioulnar/wr_prosup socket_z_coordinate=/jointset/radioulnar/wr_prosup
        x_location: SimmSpline: x=(-1.57561 1.57823) y=(-0.0055 0.01096)
        y_location: PiecewiseLinearFunction: x=(-1.57561 0 1.57561) y=(-0.0282 -0.035 -0.0392)
        z_location: SimmSpline: x=(-1.57561 0.0866167 1.57561) y=(-0.01 -0.01358 -0.01083)
      PathPoint P11: radius (-0.002 -0.0375 -0.002)
      PathWrap: wrap_object=Elbow_BIC_BRD method=hybrid
      PathWrap pathwrap_0: wrap_object=BIClong method=hybrid range=(2 5)
      ActiveForceLengthCurve: min_norm_active_fiber_length=0.4327 transition_norm_fiber_length=0.728
          max_norm_active_fiber_length=1.595 shallow_ascending_slope=0.4613 minimum_value=0
      ForceVelocityCurve: concentric_slope_at_vmax=0 concentric_slope_near_vmax=0.25 isometric_slope=5
          eccentric_slope_at_vmax=0 eccentric_slope_near_vmax=0.15 max_eccentric_velocity_force_multiplier=1.4
      FiberForceLengthCurve: strain_at_zero_force=0 strain_at_one_norm_force=0.6405 stiffness_at_low_force=0.0751
          stiffness_at_one_norm_force=6.3163 curviness=0.6658
      TendonForceLengthCurve: strain_at_one_norm_force=0.033 stiffness_at_one_norm_force=37.393
          norm_force_at_toe_end=0.2255 curviness=0.4504
